// COMSOL Multiphysics 6.0.0.405 model "permanent_magnet.mph"
// Outline of the model tree

Parameters
  height = 0.375 [in]
  diameter = 0.1875 [in]

Functions
  int1: Interpolation "mvh" | funcs = {mvh, 1}; funcname = mvh; table = {{0.00, 1.438}, {-1.003, 0.399}, {-1.049, 0.341}, {-1.081, 0.293}, {-1.097, 0.247}, {-1.108, 0.193}, {-1.110, 0.00}}; extrap = none; fununit = T; argunit = T

Coordinate systems
  ie1: InfiniteElement "Infinite Element Domain 1" on domains 1-4, 6, 8-10

Geometry
  geom1 "Geometry 1" (2D, length unit m)
    r1: Rectangle "magnet" | base = center; size = {diameter, height}
    r2: Rectangle "air"
      base = center
      layername = Layer 1
      layer = 0.1*height
      layerleft = on
      layerright = on
      layertop = on
      size = {3*diameter, 2*height}
    fin: Finalize "Form Union"

Materials
  mat1: Common "N52 (Sintered NdFeB)" on all domains
    def "Basic"
      electricconductivity = 1/1.4[uohm*m]
      relpermittivity = 1
    RemanentFluxDensity
      murec = 1.05
      normBr = 1.44[T]
  mat2: Common "Air" on domains 1-6, 8-10
    def "Basic"
      thermalexpansioncoefficient = alpha_p(pA,T)
      molarmass = 0.02897[kg/mol]
      bulkviscosity = muB(T)
      relpermeability = 1
      relpermittivity = 1
      dynamicviscosity = eta(T)
      ratioofspecificheat = 1.4
      electricconductivity = 0[S/m]
      heatcapacity = Cp(T)
      density = rho(pA,T)
      thermalconductivity = k(T)
      soundspeed = cs(T)
      eta: Piecewise | arg = T; pieces = {200.0, 1600.0, -8.38278E-7+8.35717342E-8*T^1-7.69429583E-11*T^2+4.6437266E-14*T^3-1.06585607E-17*T^4}; argunit = K; fununit = Pa*s
      Cp: Piecewise | arg = T; pieces = {200.0, 1600.0, 1047.63657-0.372589265*T^1+9.45304214E-4*T^2-6.02409443E-7*T^3+1.2858961E-10*T^4}; argunit = K; fununit = J/(kg*K)
      rho: Analytic | expr = pA*0.02897/R_const[K*mol/J]/T; args = {pA, T}; fununit = kg/m^3; argunit = {Pa, K}
      k: Piecewise | arg = T; pieces = {200.0, 1600.0, -0.00227583562+1.15480022E-4*T^1-7.90252856E-8*T^2+4.11702505E-11*T^3-7.43864331E-15*T^4}; argunit = K; fununit = W/(m*K)
      cs: Analytic | expr = sqrt(1.4*R_const[K*mol/J]/0.02897*T); args = T; fununit = m/s; argunit = K
      an1: Analytic | funcname = alpha_p; expr = -1/rho(pA,T)*d(rho(pA,T),T); args = {pA, T}; fununit = 1/K; argunit = {Pa, K}
      an2: Analytic "Analytic 2a" | funcname = muB; expr = 0.6*eta(T); args = T; fununit = Pa*s; argunit = K
    RefractiveIndex
      n = 1
      ki = 0
    NonlinearModel
      BA = (def.gamma+1)/2
    idealGas
      Rs = R_const/Mn
      heatcapacity = Cp(T)
      ratioofspecificheat = 1.4
      molarmass = 0.02897
      Cp: Piecewise | arg = T; pieces = {200.0, 1600.0, 1047.63657-0.372589265*T^1+9.45304214E-4*T^2-6.02409443E-7*T^3+1.2858961E-10*T^4}; argunit = K; fununit = J/(kg*K)

Physics
  mfnc: MagnetostaticsNoCurrents "Magnetic Fields, No Currents" on all domains
    dependent variable Vm
    mfc1: MagneticFluxConservation (default)
    mi1: MagneticInsulation (default)
    init1: init "Initial Values 1" (default)
    mfc2: MagneticFluxConservation on domains 7
      ConstitutiveRelationBH = Magnetization
      M = {0, mvh(mfnc.Hy*mu0_const)/mu0_const, 0}
      materialType = solid

Mesh
  mesh1 "Mesh 1"
    size: MeshSizeDefault | hmax = 0.2 [mm]; hmin = 0.02 [mm]; custom = on
    ftri1: FreeTri "Free Triangular 1" on domains 7
      size1: Size on domains 7 | hmax = 0.2 [mm]; hmin = 0.02 [mm]; custom = on
    ftri2: FreeTri "Free Triangular 2" on domains 1-6, 8-10
      size1: Size on domains 1-6, 8-10 | hauto = 1

Studies
  std1 "Study 1"
    stat: Stationary

Solver configurations
  sol1 "Solution 1" (study std1)
    v1: Variables "Dependent Variables 1"
    s1: Stationary "Stationary Solver 1"
      dDef: Direct
      fc1: FullyCoupled | linsolver = dDef

Datasets
  dset1: Solution | solution = sol1
  cln1: CutLine2D | data = dset1; genpoints = {{-2 [mm], 500e-6+height/2}, {2 [mm], 500e-6+height/2}}

Plots
  pg1: PlotGroup2D "Magnetic Flux Density Norm (mfnc)" | data = dset1
    surf1: Surface | expr = mfnc.normB
    str1: Streamline on boundaries 1-28 | expr = {mfnc.Bx, mfnc.By}; udist = 0.02
      col1: Color "Color Expression 1" | expr = mfnc.normB
      filt1: Filter | expr = !isScalingSystemDomain
    line1: Line | data = cln1; expr = Vm
  pg2: PlotGroup2D "Magnetic Scalar Potential (mfnc)" | data = dset1
    surf1: Surface | expr = Vm
    str1: Streamline on boundaries 1-28 | expr = {mfnc.Hx, mfnc.Hy}; udist = 0.02
      col1: Color "Color Expression 1" | expr = Vm
      filt1: Filter | expr = !isScalingSystemDomain
  pg3: PlotGroup1D "1D Plot Group 3" | data = cln1
    lngr1: LineGraph | expr = mfnc.Bx; descr = Magnetic flux density, x component; xdataexpr = x
    lngr2: LineGraph | expr = mfnc.By; descr = Magnetic flux density, y component; xdata = expr; xdataexpr = x

Exports
  plot1: Plot | filename = /Users/alexisdevitre/Desktop/HvsX.txt
  plot2: Plot | filename = /Users/alexisdevitre/Desktop/HvsY.txt